# OpenSim document version 40000
Model 3DRimlessWheel:
  gravity: 1.703489 -9.660964 0
  Ground
  BodySet:
    Body Platform: mass=10 [kg] inertia=(1 1 1 0 0 0)
      Brick Platform_geom_1: half_lengths=(10 0.01 1)
    Body Pelvis: mass=1 inertia=(1 1 1 0 0 0)
      Sphere Pelvis_geom_1: radius=0.2
    Body rHind1: mass=0.1 inertia=(0 0 0 0 0 0)
      Cylinder rHind1_geom_1: radius=0.025 half_height=0.25
    Body rHind2: mass=0.1 inertia=(0 0 0 0 0 0)
      Cylinder rHind2_geom_1: radius=0.025 half_height=0.25
    Body rHind3: mass=0.1 inertia=(0 0 0 0 0 0)
      Cylinder rHind3_geom_1: radius=0.025 half_height=0.25
    Body rHind4: mass=0.1 inertia=(0 0 0 0 0 0)
      Cylinder rHind4_geom_1: radius=0.025 half_height=0.25
    Body rHind5: mass=0.1 inertia=(0 0 0 0 0 0)
      Cylinder rHind5_geom_1: radius=0.025 half_height=0.25
    Body rHind6: mass=0.1 inertia=(0 0 0 0 0 0)
      Cylinder rHind6_geom_1: radius=0.025 half_height=0.25
    Body lHind1: mass=0.1 inertia=(0 0 0 0 0 0)
      Cylinder lHind1_geom_1: radius=0.025 half_height=0.25
    Body lHind2: mass=0.1 inertia=(0 0 0 0 0 0)
      Cylinder lHind2_geom_1: radius=0.025 half_height=0.25
    Body lHind3: mass=0.1 inertia=(0 0 0 0 0 0)
      Cylinder lHind3_geom_1: radius=0.025 half_height=0.25
    Body lHind4: mass=0.1 inertia=(0 0 0 0 0 0)
      Cylinder lHind4_geom_1: radius=0.025 half_height=0.25
    Body lHind5: mass=0.1 inertia=(0 0 0 0 0 0)
      Cylinder lHind5_geom_1: radius=0.025 half_height=0.25
    Body lHind6: mass=0.1 inertia=(0 0 0 0 0 0)
      Cylinder lHind6_geom_1: radius=0.025 half_height=0.25
  JointSet:
    PinJoint PlatformToGround: socket_parent_frame=ground_offset socket_child_frame=Platform_offset
      Coordinate platform_rz: default_value=-0.1745329 range=(-1.745329 1.745329) locked=true
      PhysicalOffsetFrame ground_offset: socket_parent=/ground translation=(0 0 0) [meters]
      PhysicalOffsetFrame Platform_offset: socket_parent=/bodyset/Platform translation=(0 0 0)
    FreeJoint PelvisToPlatform: socket_parent_frame=/bodyset/Platform socket_child_frame=/bodyset/Pelvis
      Coordinate Pelvis_rx: default_value=5.57369e-15 default_speed_value=1.367003e-15 range=(-3.141593 3.141593)
      Coordinate Pelvis_ry: default_value=-2.763402e-16 default_speed_value=1.793943e-14 range=(-3.141593 3.141593)
      Coordinate Pelvis_rz: default_value=0 default_speed_value=-3.220701 range=(-3.141593 3.141593)
      Coordinate Pelvis_tx: default_value=0 default_speed_value=1.830682 range=(-10 10)
      Coordinate Pelvis_ty: default_value=0.553151 default_speed_value=0.1065758 range=(-5 5)
      Coordinate Pelvis_tz: default_value=5.470917e-30 default_speed_value=2.303049e-30 range=(-1 1)
    WeldJoint rHind1ToPelvis: socket_parent_frame=Pelvis_offset socket_child_frame=rHind1_offset
      PhysicalOffsetFrame Pelvis_offset: socket_parent=/bodyset/Pelvis translation=(0 0 0.2)
          orientation=(0 0 0.5235988) [radians]
      PhysicalOffsetFrame rHind1_offset: socket_parent=/bodyset/rHind1 translation=(0 -0.25 0)
    WeldJoint rHind2ToPelvis: socket_parent_frame=Pelvis_offset socket_child_frame=rHind2_offset
      PhysicalOffsetFrame Pelvis_offset: socket_parent=/bodyset/Pelvis translation=(0 0 0.2) orientation=(0 0 1.570796)
      PhysicalOffsetFrame rHind2_offset: socket_parent=/bodyset/rHind2 translation=(0 -0.25 0)
    WeldJoint rHind3ToPelvis: socket_parent_frame=Pelvis_offset socket_child_frame=rHind3_offset
      PhysicalOffsetFrame Pelvis_offset: socket_parent=/bodyset/Pelvis translation=(0 0 0.2) orientation=(0 0 2.617994)
      PhysicalOffsetFrame rHind3_offset: socket_parent=/bodyset/rHind3 translation=(0 -0.25 0)
    WeldJoint rHind4ToPelvis: socket_parent_frame=Pelvis_offset socket_child_frame=rHind4_offset
      PhysicalOffsetFrame Pelvis_offset: socket_parent=/bodyset/Pelvis translation=(0 0 0.2)
          orientation=(0 0 -2.617994)
      PhysicalOffsetFrame rHind4_offset: socket_parent=/bodyset/rHind4 translation=(0 -0.25 0)
    WeldJoint rHind5ToPelvis: socket_parent_frame=Pelvis_offset socket_child_frame=rHind5_offset
      PhysicalOffsetFrame Pelvis_offset: socket_parent=/bodyset/Pelvis translation=(0 0 0.2)
          orientation=(0 0 -1.570796)
      PhysicalOffsetFrame rHind5_offset: socket_parent=/bodyset/rHind5 translation=(0 -0.25 0)
    WeldJoint rHind6ToPelvis: socket_parent_frame=Pelvis_offset socket_child_frame=rHind6_offset
      PhysicalOffsetFrame Pelvis_offset: socket_parent=/bodyset/Pelvis translation=(0 0 0.2)
          orientation=(0 0 -0.5235988)
      PhysicalOffsetFrame rHind6_offset: socket_parent=/bodyset/rHind6 translation=(0 -0.25 0)
    WeldJoint lHind1ToPelvis: socket_parent_frame=Pelvis_offset socket_child_frame=lHind1_offset
      PhysicalOffsetFrame Pelvis_offset: socket_parent=/bodyset/Pelvis translation=(0 0 -0.2)
      PhysicalOffsetFrame lHind1_offset: socket_parent=/bodyset/lHind1 translation=(0 -0.25 0)
    WeldJoint lHind2ToPelvis: socket_parent_frame=Pelvis_offset socket_child_frame=lHind2_offset
      PhysicalOffsetFrame Pelvis_offset: socket_parent=/bodyset/Pelvis translation=(0 0 -0.2)
          orientation=(0 0 1.047198)
      PhysicalOffsetFrame lHind2_offset: socket_parent=/bodyset/lHind2 translation=(0 -0.25 0)
    WeldJoint lHind3ToPelvis: socket_parent_frame=Pelvis_offset socket_child_frame=lHind3_offset
      PhysicalOffsetFrame Pelvis_offset: socket_parent=/bodyset/Pelvis translation=(0 0 -0.2)
          orientation=(0 0 2.094395)
      PhysicalOffsetFrame lHind3_offset: socket_parent=/bodyset/lHind3 translation=(0 -0.25 0)
    WeldJoint lHind4ToPelvis: socket_parent_frame=Pelvis_offset socket_child_frame=lHind4_offset
      PhysicalOffsetFrame Pelvis_offset: socket_parent=/bodyset/Pelvis translation=(0 0 -0.2)
          orientation=(0 0 3.141593)
      PhysicalOffsetFrame lHind4_offset: socket_parent=/bodyset/lHind4 translation=(0 -0.25 0)
    WeldJoint lHind5ToPelvis: socket_parent_frame=Pelvis_offset socket_child_frame=lHind5_offset
      PhysicalOffsetFrame Pelvis_offset: socket_parent=/bodyset/Pelvis translation=(0 0 -0.2)
          orientation=(0 0 -2.094395)
      PhysicalOffsetFrame lHind5_offset: socket_parent=/bodyset/lHind5 translation=(0 -0.25 0)
    WeldJoint lHind6ToPelvis: socket_parent_frame=Pelvis_offset socket_child_frame=lHind6_offset
      PhysicalOffsetFrame Pelvis_offset: socket_parent=/bodyset/Pelvis translation=(0 0 -0.2)
          orientation=(0 0 -1.047198)
      PhysicalOffsetFrame lHind6_offset: socket_parent=/bodyset/lHind6 translation=(0 -0.25 0)
  ForceSet:
    HuntCrossleyForce rHind1Force: transition_velocity=0.2
      ContactParametersSet contact_parameters:
        ContactParameters: geometry=(rHind1Contact PlatformContact) stiffness=1000000 dissipation=2 static_friction=0.8
            dynamic_friction=0.4 viscous_friction=0.4
    HuntCrossleyForce rHind2Force: transition_velocity=0.2
      ContactParametersSet contact_parameters:
        ContactParameters: geometry=(rHind2Contact PlatformContact) stiffness=1000000 dissipation=2 static_friction=0.8
            dynamic_friction=0.4 viscous_friction=0.4
    HuntCrossleyForce rHind3Force: transition_velocity=0.2
      ContactParametersSet contact_parameters:
        ContactParameters: geometry=(rHind3Contact PlatformContact) stiffness=1000000 dissipation=2 static_friction=0.8
            dynamic_friction=0.4 viscous_friction=0.4
    HuntCrossleyForce rHind4Force: transition_velocity=0.2
      ContactParametersSet contact_parameters:
        ContactParameters: geometry=(rHind4Contact GroundContact) stiffness=1000000 dissipation=2 static_friction=0.8
            dynamic_friction=0.4 viscous_friction=0.4
    HuntCrossleyForce rHind5Force: transition_velocity=0.2
      ContactParametersSet contact_parameters:
        ContactParameters: geometry=(rHind5Contact GroundContact) stiffness=1000000 dissipation=2 static_friction=0.8
            dynamic_friction=0.4 viscous_friction=0.4
    HuntCrossleyForce rHind6Force: transition_velocity=0.2
      ContactParametersSet contact_parameters:
        ContactParameters: geometry=(rHind6Contact GroundContact) stiffness=1000000 dissipation=2 static_friction=0.8
            dynamic_friction=0.4 viscous_friction=0.4
    HuntCrossleyForce lHind1Force: transition_velocity=0.2
      ContactParametersSet contact_parameters:
        ContactParameters: geometry=(lHind1Contact PlatformContact) stiffness=1000000 dissipation=2 static_friction=0.8
            dynamic_friction=0.4 viscous_friction=0.4
    HuntCrossleyForce lHind2Force: transition_velocity=0.2
      ContactParametersSet contact_parameters:
        ContactParameters: geometry=(lHind2Contact PlatformContact) stiffness=1000000 dissipation=2 static_friction=0.8
            dynamic_friction=0.4 viscous_friction=0.4
    HuntCrossleyForce lHind3Force: transition_velocity=0.2
      ContactParametersSet contact_parameters:
        ContactParameters: geometry=(lHind3Contact PlatformContact) stiffness=1000000 dissipation=2 static_friction=0.8
            dynamic_friction=0.4 viscous_friction=0.4
    HuntCrossleyForce lHind4Force: transition_velocity=0.2
      ContactParametersSet contact_parameters:
        ContactParameters: geometry=(lHind4Contact GroundContact) stiffness=1000000 dissipation=2 static_friction=0.8
            dynamic_friction=0.4 viscous_friction=0.4
    HuntCrossleyForce lHind5Force: transition_velocity=0.2
      ContactParametersSet contact_parameters:
        ContactParameters: geometry=(lHind5Contact GroundContact) stiffness=1000000 dissipation=2 static_friction=0.8
            dynamic_friction=0.4 viscous_friction=0.4
    HuntCrossleyForce lHind6Force: transition_velocity=0.2
      ContactParametersSet contact_parameters:
        ContactParameters: geometry=(lHind6Contact GroundContact) stiffness=1000000 dissipation=2 static_friction=0.8
            dynamic_friction=0.4 viscous_friction=0.4
  ContactGeometrySet:
    ContactHalfSpace PlatformContact: socket_frame=/bodyset/Platform location=(0 0.025 0) orientation=(0 0 -1.57)
    ContactSphere rHind1Contact: socket_frame=/bodyset/rHind1 location=(0 0.25 0) radius=0.05
    ContactSphere rHind2Contact: socket_frame=/bodyset/rHind2 location=(0 0.25 0) radius=0.05
    ContactSphere rHind3Contact: socket_frame=/bodyset/rHind3 location=(0 0.25 0) radius=0.05
    ContactSphere rHind4Contact: socket_frame=/bodyset/rHind4 location=(0 0.25 0) radius=0.05
    ContactSphere rHind5Contact: socket_frame=/bodyset/rHind5 location=(0 0.25 0) radius=0.05
    ContactSphere rHind6Contact: socket_frame=/bodyset/rHind6 location=(0 0.25 0) radius=0.05
    ContactSphere lHind1Contact: socket_frame=/bodyset/lHind1 location=(0 0.25 0) radius=0.05
    ContactSphere lHind2Contact: socket_frame=/bodyset/lHind2 location=(0 0.25 0) radius=0.05
    ContactSphere lHind3Contact: socket_frame=/bodyset/lHind3 location=(0 0.25 0) radius=0.05
    ContactSphere lHind4Contact: socket_frame=/bodyset/lHind4 location=(0 0.25 0) radius=0.05
    ContactSphere lHind5Contact: socket_frame=/bodyset/lHind5 location=(0 0.25 0) radius=0.05
    ContactSphere lHind6Contact: socket_frame=/bodyset/lHind6 location=(0 0.25 0) radius=0.05
