# OpenSim document version 40000
Model 3DRimlessWheel:
  gravity: 0.4279062 -9.800663 0
  Ground
  BodySet:
    Body Pelvis: mass=1 [kg] inertia=(1 1 1 0 0 0)
      Sphere Pelvis_geom_1: radius=0.2
  JointSet:
    CustomJoint PelvisToGround: socket_parent_frame=ground_offset socket_child_frame=Pelvis_offset
      Coordinate Pelvis_rx: default_value=0 range=(-3.141593 3.141593)
      Coordinate Pelvis_ry: default_value=0 range=(-3.141593 3.141593)
      Coordinate Pelvis_rz: default_value=0 default_speed_value=-0.8598144 range=(-3.141593 3.141593)
      Coordinate Pelvis_tx: default_value=0 default_speed_value=0.4567881 range=(-10 10)
      Coordinate Pelvis_ty: default_value=0.5238922 default_speed_value=0.004423558 range=(-5 5)
      Coordinate Pelvis_tz: default_value=0 range=(-1 1)
      PhysicalOffsetFrame ground_offset: socket_parent=/ground translation=(0 0 0) [meters]
      PhysicalOffsetFrame Pelvis_offset: socket_parent=/bodyset/Pelvis translation=(0 0 0)
      SpatialTransform:
        TransformAxis rotation1: coordinates=Pelvis_rx axis=(1 0 0) LinearFunction(coefficients=1 0)
        TransformAxis rotation2: coordinates=Pelvis_ry axis=(0 1 0) LinearFunction(coefficients=1 0)
        TransformAxis rotation3: coordinates=Pelvis_rz axis=(0 0 1) LinearFunction(coefficients=1 0)
        TransformAxis translation1: coordinates=Pelvis_tx axis=(1 0 0) LinearFunction(coefficients=1 0)
        TransformAxis translation2: coordinates=Pelvis_ty axis=(0 1 0) LinearFunction(coefficients=1 0)
        TransformAxis translation3: coordinates=Pelvis_tz axis=(0 0 1) LinearFunction(coefficients=1 0)
  ForceSet:
    SmoothSphereHalfSpaceForce [values shared by the 12 below unless stated]: socket_half_space=/contactgeometryset/GroundContact
        stiffness=1000000 [N/m^2] dissipation=2 [s/m] static_friction=0.8 dynamic_friction=0.4 viscous_friction=0.4
        transition_velocity=0.2 [m/s]
    SmoothSphereHalfSpaceForce rHind1Force: socket_sphere=/contactgeometryset/rHind1Contact
    SmoothSphereHalfSpaceForce rHind2Force: socket_sphere=/contactgeometryset/rHind2Contact
    SmoothSphereHalfSpaceForce rHind3Force: socket_sphere=/contactgeometryset/rHind3Contact
    SmoothSphereHalfSpaceForce rHind4Force: socket_sphere=/contactgeometryset/rHind4Contact
    SmoothSphereHalfSpaceForce rHind5Force: socket_sphere=/contactgeometryset/rHind5Contact
    SmoothSphereHalfSpaceForce rHind6Force: socket_sphere=/contactgeometryset/rHind6Contact
    SmoothSphereHalfSpaceForce lHind1Force: socket_sphere=/contactgeometryset/lHind1Contact
    SmoothSphereHalfSpaceForce lHind2Force: socket_sphere=/contactgeometryset/lHind2Contact
    SmoothSphereHalfSpaceForce lHind3Force: socket_sphere=/contactgeometryset/lHind3Contact
    SmoothSphereHalfSpaceForce lHind4Force: socket_sphere=/contactgeometryset/lHind4Contact
    SmoothSphereHalfSpaceForce lHind5Force: socket_sphere=/contactgeometryset/lHind5Contact
    SmoothSphereHalfSpaceForce lHind6Force: socket_sphere=/contactgeometryset/lHind6Contact
  ContactGeometrySet:
    ContactHalfSpace GroundContact: socket_frame=/ground location=(0 0 0) orientation=(0 0 -1.570796)
    ContactSphere [values shared by the 12 below unless stated]: socket_frame=/bodyset/Pelvis radius=0.025
    ContactSphere rHind1Contact: location=(-0.25 0.4330127 0.2)
    ContactSphere rHind2Contact: location=(-0.5 3.061617e-17 0.2)
    ContactSphere rHind3Contact: location=(-0.25 -0.4330127 0.2)
    ContactSphere rHind4Contact: location=(0.25 -0.4330127 0.2)
    ContactSphere rHind5Contact: location=(0.5 -9.184851e-17 0.2)
    ContactSphere rHind6Contact: location=(0.25 0.4330127 0.2)
    ContactSphere lHind1Contact: location=(0 0.5 -0.2)
    ContactSphere lHind2Contact: location=(-0.4330127 0.25 -0.2)
    ContactSphere lHind3Contact: location=(-0.4330127 -0.25 -0.2)
    ContactSphere lHind4Contact: location=(-6.123234e-17 -0.5 -0.2)
    ContactSphere lHind5Contact: location=(0.4330127 -0.25 -0.2)
    ContactSphere lHind6Contact: location=(0.4330127 0.25 -0.2)
